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/batch
! ANSYS input file written by Workbench version 2020 R2
! File used for geometry attach: E:\GT_Courses\Semester_1\ME-6124\Project\Master_Geometry_3\Master Geometry_files\dp0\SYS-1\DM\SYS-1.agdb
/title,Master Geometry--Transient (A5)
/com,--- Data in consistent MKS units. See Solving Units in the help system for more information.
/units,MKS
/prep7
! Turn off shape checking because checks already performed inside WB mesher.
! See help system for more information.
SHPP,OFF,,NOWARN
etcon,set             ! allow ANSYS to choose best KEYOP's for 180x elements
/com,*********** Nodes for the whole assembly ***********
nblock,3,,7977
(1i9,3e20.9e3)
        1     4.720455930E-02     2.964680000E-10    -7.183196405E-02
        2     3.806088590E-02     7.465816956E-03    -7.183195306E-02
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-1
/com,*********** Nodes for all Remote Points ***********
nblock,3
(1i9,3e20.9e3)
     7253     0.000000000E+00     0.000000000E+00     0.000000000E+00
     7254     0.000000000E+00     0.000000000E+00     0.000000000E+00
     7255     0.000000000E+00     0.000000000E+00     0.000000000E+00
     7256     0.000000000E+00     0.000000000E+00     0.000000000E+00
-1
/com,*********** Elements for Body 1 "Hip Stem Geometry" ***********
et,1,187
eblock,19,solid,,4574
(19i9)
        1        1        1        1        0        0        0        0       10        0        1      524     1079      639      970     4472     5316     4464     4467
     7040     5315
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-1
/com,*********** Send User Defined Coordinate System(s) ***********
local,12,0,1.9e-002,0.,-2.3e-002,0.,0.,0.
local,13,0,3.1e-002,0.,-2.e-002,0.,0.,0.
local,14,0,0.,0.,0.,19.1237752713264,-7.49667997923514,1.71466051352922
local,15,0,0.,0.,0.,179.119552984202,-9.96155809809037,-5.07673301656972
local,16,0,1.92e-002,0.,-2.28e-002,0.,0.,0.
local,17,0,3.2e-002,0.,-2.09e-002,0.,0.,0.
csys,0
toffst,273.15,  ! Temperature offset from absolute zero
/com,*********** Set Reference Temperature ***********
tref,22.
/com,*********** Send Materials ***********
Temperature = 'TEMP' ! Temperature
MPTEMP,,,,,,,,
MPTEMP,1,20
MPTEMP,2,100
MPTEMP,3,200
MPTEMP,4,300
MPTEMP,5,400
MPTEMP,6,500
MPTEMP,7,600
MPTEMP,8,700
MPTEMP,9,800
MPTEMP,10,900
MPTEMP,11,1000
MPTEMP,12,1100
MPTEMP,13,1200
MPTEMP,14,1300
MPTEMP,15,1400
MPTEMP,16,1500
MPTEMP,17,1600
MPDATA,EX,1, ,107000000000,103400000000,99510000000,93710000000,85500000000,74710000000,
MPDATA,EX,1, ,61840000000,48160000000,35290000000,24500000000,16290000000,10490000000,
MPDATA,EX,1, ,6610000000,4106000000,2528000000,1547000000,943500000,	! Pa
MPTEMP,,,,,,,,
MPTEMP,,,,,,,,
MPTEMP,1,20
MPTEMP,2,100
MPTEMP,3,200
MPTEMP,4,300
MPTEMP,5,400
MPTEMP,6,500
MPTEMP,7,600
MPTEMP,8,700
MPTEMP,9,800
MPTEMP,10,900
MPTEMP,11,1000
MPTEMP,12,1100
MPTEMP,13,1200
MPTEMP,14,1300
MPTEMP,15,1400
MPTEMP,16,1500
MPTEMP,17,1600
MPDATA,NUXY,1, ,0.323,0.328,0.334,0.339,0.345,0.351,
MPDATA,NUXY,1, ,0.357,0.363,0.369,0.374,0.38,0.386,
MPDATA,NUXY,1, ,0.392,0.398,0.403,0.409,0.415,
MPTEMP,,,,,,,,
MPTEMP,,,,,,,,
MPTEMP,1,20
MPTEMP,2,100
MPTEMP,3,200
MPTEMP,4,300
MPTEMP,5,400
MPTEMP,6,500
MPTEMP,7,600
MPTEMP,8,700
MPTEMP,9,800
MPTEMP,10,900
MPTEMP,11,1000
MPTEMP,12,1100
MPTEMP,13,1200
MPTEMP,14,1300
MPTEMP,15,1400
MPTEMP,16,1500
MPTEMP,17,1600
MPTEMP,18,1650
MPTEMP,19,1700
MPTEMP,20,1800
MPTEMP,21,1900
MPTEMP,22,1950
MPDATA,KXX,1, ,8.11,7.74,7.52,7.55,7.81,8.29,
MPDATA,KXX,1, ,8.96,9.81,10.82,11.98,13.26,14.65,
MPDATA,KXX,1, ,16.13,17.69,19.29,20.93,22.6,28.53,
MPDATA,KXX,1, ,29.45,31.28,33.11,34.02,	! W m^-1 C^-1
MPDATA,KYY,1, ,8.11,7.74,7.52,7.55,7.81,8.29,
MPDATA,KYY,1, ,8.96,9.81,10.82,11.98,13.26,14.65,
MPDATA,KYY,1, ,16.13,17.69,19.29,20.93,22.6,28.53,
MPDATA,KYY,1, ,29.45,31.28,33.11,34.02,	! W m^-1 C^-1
MPDATA,KZZ,1, ,7.01,7.34,8.02,8.95,10.07,11.36,
MPDATA,KZZ,1, ,12.75,14.21,15.68,17.14,18.52,19.78,
MPDATA,KZZ,1, ,20.88,21.77,22.42,22.76,22.76,28.53,
MPDATA,KZZ,1, ,29.45,31.28,33.11,34.02,	! W m^-1 C^-1
MPTEMP,,,,,,,,
MPTEMP,,,,,,,,
MPTEMP,1,-253.15
MPTEMP,2,-173.15
MPTEMP,3,-73.15
MPTEMP,4,26.85
MPTEMP,5,126.85
MPTEMP,6,226.85
MPTEMP,7,326.85
MPTEMP,8,426.85
MPTEMP,9,526.85
MPTEMP,10,626.85
MPTEMP,11,726.85
MPTEMP,12,826.85
MPTEMP,13,926.85
MPTEMP,14,1026.85
MPTEMP,15,1126.85
MPTEMP,16,1226.85
MPTEMP,17,1326.85
MPTEMP,18,1376.85
MPTEMP,19,1426.85
MPTEMP,20,1526.85
MPTEMP,21,1626.85
MPTEMP,22,1676.85
MPDATA,C,1, ,542.67348,552.065,565.86,581.575,598.82,617.205,
MPDATA,C,1, ,636.34,655.835,675.3,694.345,712.58,729.615,
MPDATA,C,1, ,745.06,758.525,769.62,777.955,783.14,830,
MPDATA,C,1, ,830,830,830,830,	! J kg^-1 C^-1
MPTEMP,,,,,,,,
MPTEMP,,,,,,,,
MPTEMP,1,-233.15
MPTEMP,2,-173.15
MPTEMP,3,19.85
MPTEMP,4,126.85
MPTEMP,5,326.85
MPTEMP,6,526.85
MPTEMP,7,626.86
MPTEMP,8,826.86
MPDATA,ALPX,1, ,6.5e-06,7.1e-06,8.9e-06,9.7e-06,1.08e-05,1.14e-05,
MPDATA,ALPX,1, ,1.16e-05,1.16e-05,	! C^-1
MPTEMP,,,,,,,,
MPAMOD,1,19.85,	! C
MPTEMP,,,,,,,,
MPTEMP,1,20
MPTEMP,2,1227
MPTEMP,3,1777
MPTEMP,4,1877
MPTEMP,5,2127
MPTEMP,6,2500
MPDATA,DENS,1, ,4405,4243,4189,3865,3730,3730,	! kg m^-3
MPTEMP,,,,,,,,

TB,BISO,1,6,
TBTEMP,20
TBDATA,1,1098000000,1332000000
TBTEMP,204
TBDATA,1,844000000,1207000000
TBTEMP,427
TBDATA,1,663000000,1033000000
TBTEMP,538
TBDATA,1,527000000,943000000
TBTEMP,815
TBDATA,1,60000000,708000000
TBTEMP,944
TBDATA,1,21000000,596000000

!************************* Model Summary ********************
!Hip Stem Geometry,	Ti-6Al-4V,	matid,	1
!************************* End Model Summary ********************
/com,*********** Fixed Supports ***********
CMBLOCK,_FIXEDSU,NODE,       51
(8i10)
       100       101       102       109       114       115       195       196
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cmsel,s,_FIXEDSU
d,all,all
nsel,all
/com,*********** Create Remote Point "Internal Remote Point 2" ***********
! -------- Remote Point Used by "Running" --------
*set,tid,3
*set,cid,2
et,cid,174
et,tid,170
keyo,tid,2,1               ! Don't fix the pilot node
keyo,tid,4,0               ! Activate all DOF's due to large deformation
keyo,cid,12,5              ! Bonded Contact
keyo,cid,4,1               ! Deformable RBE3 style load
keyo,cid,2,2               ! MPC style contact
eblock,10,,,98
(15i9)
     5876        2        2        2        0       83       85      510      510     1793     1808      510     1797
     5877        2        2        2        0       81       97      293      293     1779     1922      293     1780
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-1
*set,_npilot,7254
_npilot50=_npilot
type,tid
mat ,cid
real,cid
tshape,pilo
en,5974,_npilot
tshape
csys,14
nrot,7254
csys,0
/com,*********** Construct Remote Force ***********

*DIM,_loadvari49x,TABLE,9,1,1,TIME,
! Time values
_loadvari49x(1,0,1) = 0.
_loadvari49x(2,0,1) = 9.5e-002
_loadvari49x(3,0,1) = 0.198
_loadvari49x(4,0,1) = 0.295
_loadvari49x(5,0,1) = 0.394
_loadvari49x(6,0,1) = 0.497
_loadvari49x(7,0,1) = 0.601
_loadvari49x(8,0,1) = 0.706
_loadvari49x(9,0,1) = 0.77
! Load values
_loadvari49x(1,1,1) = 96.5376685
_loadvari49x(2,1,1) = 112.2340785
_loadvari49x(3,1,1) = 222.694698
_loadvari49x(4,1,1) = 516.595305
_loadvari49x(5,1,1) = 353.790981
_loadvari49x(6,1,1) = 199.837893
_loadvari49x(7,1,1) = 234.413122
_loadvari49x(8,1,1) = 223.6836395
_loadvari49x(9,1,1) = 133.626737


*DIM,_loadvari49y,TABLE,9,1,1,TIME,
! Time values
_loadvari49y(1,0,1) = 0.
_loadvari49y(2,0,1) = 9.5e-002
_loadvari49y(3,0,1) = 0.198
_loadvari49y(4,0,1) = 0.295
_loadvari49y(5,0,1) = 0.394
_loadvari49y(6,0,1) = 0.497
_loadvari49y(7,0,1) = 0.601
_loadvari49y(8,0,1) = 0.706
_loadvari49y(9,0,1) = 0.77
! Load values
_loadvari49y(1,1,1) = -24.1993475
_loadvari49y(2,1,1) = -89.1729
_loadvari49y(3,1,1) = -160.90916
_loadvari49y(4,1,1) = -565.9939
_loadvari49y(5,1,1) = -172.804435
_loadvari49y(6,1,1) = -90.44348
_loadvari49y(7,1,1) = -120.886395
_loadvari49y(8,1,1) = -44.7632505
_loadvari49y(9,1,1) = -39.9344405


*DIM,_loadvari49z,TABLE,9,1,1,TIME,
! Time values
_loadvari49z(1,0,1) = 0.
_loadvari49z(2,0,1) = 9.5e-002
_loadvari49z(3,0,1) = 0.198
_loadvari49z(4,0,1) = 0.295
_loadvari49z(5,0,1) = 0.394
_loadvari49z(6,0,1) = 0.497
_loadvari49z(7,0,1) = 0.601
_loadvari49z(8,0,1) = 0.706
_loadvari49z(9,0,1) = 0.77
! Load values
_loadvari49z(1,1,1) = -84.664765
_loadvari49z(2,1,1) = -373.073295
_loadvari49z(3,1,1) = -921.77145
_loadvari49z(4,1,1) = -2166.6318
_loadvari49z(5,1,1) = -1257.9853
_loadvari49z(6,1,1) = -556.76755
_loadvari49z(7,1,1) = -422.41634
_loadvari49z(8,1,1) = -122.554915
_loadvari49z(9,1,1) = -124.78146

tblist
fini
/com,****************************************************************************
/com,*************************    SOLUTION       ********************************
/com,****************************************************************************
/solu
antype,4                   ! transient analysis
nlgeom,on                  ! Turn on Large Deformation Effects
kbc,1                      ! stepped BC's
_thickRatio=  1     ! Ratio of thick parts in the model
eqsl,pcg,1e-8,,,,,,1
cntr,print,1               ! print out contact info and also make no initial contact an error
dmpoption,emat,no             ! Don't combine emat file for DANSYS
dmpoption,esav,no             ! Don't combine esav file for DANSYS
trnopt,full,,,,,hht        ! HHT time integration method
tintp, mosp			! Choose transient integration settings for moderate speed application
nldiag,cont,iter           ! print out contact info each equilibrium iteration
rescontrol,define,last,last,,dele	   ! Program Controlled
/com,****************************************************
/com,******************* SOLVE FOR LS 1 OF 1 ****************
nsel,s,node,,7254
f,all,fx,%_loadvari49x%
f,all,fy,%_loadvari49y%
f,all,fz,%_loadvari49z%
nsel,all
autots,on                   ! User turned on automatic time stepping
deltim,0.025,0.025,0.025,OFF
time,0.77
timint,on                  ! Turn on time integration effects
outres,erase
outres,all,none
outres,nsol,all,
outres,rsol,all
outres,eangl,all
outres,etmp,all
outres,veng,all
outres,strs,all,
outres,epel,all,
outres,eppl,all,
outres,cont,all,
outres,v,all,
outres,a,all,
! *********** WB SOLVE COMMAND ***********
! check interactive state
*get,ANSINTER_,active,,int
*if,ANSINTER_,ne,0,then
/eof
*endif
solve
/com *************** Write FE CONNECTORS *********
CEWRITE,file,ce,,INTE
/com,****************************************************
/com,*************** FINISHED SOLVE FOR LS 1 *************
*get,_PCGITER,active,,solu,cgiter
/post1
fini
